!**************************************************
! BOUNDARY CONDITIONS
!**************************************************
!
/SOLU
DK,1,,,,0,ALL                                       ! Fix in first point
DK,n_points,,,,0,ALL                                ! Fix in last point
!
/PBC,ALL, ,1                                        ! Plot to show applied boundary conditions
LPLOT
/ESHAPE,1.0                                         ! Turn on display of element
!
!**************************************************
! SOLVE
!**************************************************
!
! ANALYSIS TO SOLVE (analysis_to_solve)
! 1 - pressure
! 2 - modal
!
analysis_to_solve=1
*IF,analysis_to_solve,EQ,1,THEN
    !**************************************************
    ! PRESSURE SOLVE
    !**************************************************
    !
*ELSEIF,analysis_to_solve,EQ,2,THEN
    !**************************************************
    ! MODAL SOLVE
    !**************************************************
    antype,modal                                        ! To perform modal analysis
    modopt,lanb,modes                                   ! Mode-extraction method, used Block Lanczos with # modes to extract
    lumpm,on                                            ! Lumped Mass Approximation
    mxpand,modes,,,yes
    !
    SOLVE                                               ! Solve model
    FINISH
*ENDIF
